;; 1. Based on: run102
;; 2. Description: PK model 1 cmt base WT-CL allom SEX-CL
;; x1. Author: coen
;; From "/opt/pirana/pirana/latest/examples"

$PROBLEM PK model 1 cmt base

$INPUT ID TIME MDV EVID DV AMT  SEX WT ETN
$DATA workshop.csv IGNORE=@
$SUBROUTINES ADVAN2 TRANS2

$PK
ET=1
IF(ETN.EQ.3) ET=1.3
KA = THETA(1)
CL = THETA(2)*((WT/70)**0.75)*( THETA(6)**SEX) * EXP(ETA(1))
V = THETA(3)*EXP(ETA(2))
SC=V


$THETA
(0, 2)  ; KA
(0, 3)  ; CL
(0, 10) ; V2
(0.02)  ; RUVp
(1)     ; RUVa
(0,1) ; SEX - CL

$OMEGA
0.05    ; iiv CL
0.2     ; iiv V2

$SIGMA
1 FIX

$ERROR
IPRED = F
IRES = DV-IPRED
W = IPRED*THETA(4) + THETA(5)
IF (W.EQ.0) W = 1
IWRES = IRES/W
Y= IPRED+W*ERR(1)

$EST METHOD=1 INTERACTION MAXEVAL=9999 SIG=3 PRINT=5 NOABORT POSTHOC MSFO=msf105
$COV PRINT=E
;$SIM (1234) NSUBPROBLEMS=1 ONLYSIM

$TABLE ID TIME DV IPRED IRES IWRES Y NOPRINT ONEHEADER FILE=sdtab105

$TABLE ID CL V KA ETA1 ETA2 NOPRINT NOAPPEND ONEHEADER FILE=patab105

$TABLE ID SEX ETN NOPRINT NOAPPEND ONEHEADER FILE=catab105

$TABLE ID WT NOPRINT NOAPPEND ONEHEADER FILE=cotab105
